Simulations: Version=159
  DataStore
  Experiment
    Factors
      Factor: Specification=[FertiliseOnFixedDate].Script.Amount = 500 to 500 step 1
    Simulation PeanutRCP85
      Clock: Start=2011-01-01; End=2100-12-31
      Summary summaryfile
      Weather: FileName=/Users/fuhsinliao/Downloads/Climate_Rcp85_lat19_lon105.met
      SoilArbitrator Soil Arbitrator
      MicroClimate: a_interception=0; b_interception=1; c_interception=0; d_interception=0; SoilHeatFluxFraction=0.4; MinimumHeightDiffForNewLayer=0; NightInterceptionFraction=0.5; ReferenceHeight=2
      Zone paddock: Area=1; Slope=0; AspectAngle=0; Altitude=50
        Irrigation
        Manager Automatic irrigation based on water deficit
          AutoIrrigationOn = True
          FASWThreshold = 0.9
          FASWDepth = 2000
```csharp
using Models.Interfaces;
using APSIM.Shared.Utilities;
using System.Xml.Serialization;
using Models;
using Models.PMF;
using Models.Soils;
using System.Text;
using System.Collections.Generic;
using Models.Core;
using System;
using System.Linq;
using Models.Soils.Nutrients;

namespace Models
{
    [Serializable] 
    public class Script : Model
    {
        [Link] private Zone zone;
        [Link] private Irrigation irrigation;
        [Link] private Soil soil;
        [Link]
        private IPhysical soilPhysical;
        [Link]
        private ISoilWater waterBalance;
        public double FASW { get; set; }
        public double WaterDeficit  { get; set; }
    
        
        [Description("Auto irrigation on?")]
        public bool AutoIrrigationOn { get; set; }

        [Description("Threshold fraction available water (0-1)")]
        public double FASWThreshold { get; set; }

        [Description("Soil depth (mm) to which fraction available water is calculated")]
        public double FASWDepth { get; set; }

        [EventSubscribe("DoManagement")]
        private void OnDoManagement(object sender, EventArgs e)
        {
            CalculateFASW();
            if (AutoIrrigationOn)
            {
                if (FASW < FASWThreshold)
                {
                    double amount = 10;
                    irrigation.Apply(WaterDeficit, depth: 0);
                }
            }
        }
        
        private void CalculateFASW()
        {
            double[] LL15 = MathUtilities.Multiply(soilPhysical.LL15, soilPhysical.Thickness);
            double[] DUL = MathUtilities.Multiply(soilPhysical.DUL, soilPhysical.Thickness);
        
            int nlayr = GetLayerIndex();
            double cumdep = MathUtilities.Sum(soilPhysical.Thickness, 0, nlayr, 0.0);

            double excess_fr = MathUtilities.Divide((cumdep - FASWDepth), soilPhysical.Thickness[nlayr], 0.0);

            // note that results may be strange if swdep < ll15
            double avail_sw = (MathUtilities.Sum(waterBalance.SWmm, 0, nlayr, 0.0)
                              - excess_fr * waterBalance.SWmm[nlayr])
                              - (MathUtilities.Sum(LL15, 0, nlayr, 0.0)
                              - excess_fr * LL15[nlayr]);


            double pot_avail_sw = (MathUtilities.Sum(DUL, 0, nlayr, 0.0)
                                  - excess_fr * DUL[nlayr])
                                  - (MathUtilities.Sum(LL15, 0, nlayr, 0.0)
                                  - excess_fr * LL15[nlayr]);

            FASW = MathUtilities.Divide(avail_sw, pot_avail_sw, 0.0);
            WaterDeficit = MathUtilities.Constrain(pot_avail_sw - avail_sw, 0.0, 100000);
        }

        private int GetLayerIndex()
        {
            double[] cumThickness = soilPhysical.ThicknessCumulative;
            for (int i = 1; i < cumThickness.Length; i++)
            {
                if (FASWDepth < cumThickness[i])
                    return i - 1;
            }
            
            return cumThickness.Length - 1;
        }

    }
}
```
        Fertiliser
        SurfaceOrganicMatter: InitialResidueName=maize; InitialResidueType=maize; InitialResidueMass=4500; InitialStandingFraction=0; InitialCPR=0; InitialCNR=55
        Report PeanutReport85: EventNames=[Peanut].Harvesting
          VariableNames:
            [Clock].Today
            [Peanut].Grain.Total.Wt*10 as Yield
            sum([Peanut].Total.Wt) as TotalYield2
            [Weather].Rain
            sum([Soil].NO3.kgha)
            [Peanut].TotalLive.Wt
        Plant Peanut
        Manager FertiliseOnFixedDate
          EachYear = True
          Dates = 30-nov, 15-apr
          UseCritNThreshold = False
          CritNThreshold = 50
          CritNDepth = 75
          Depth = 50
          Amount = 25
          FertiliserType = UreaN
```csharp
using Models.Interfaces;
using System.Linq;
using APSIM.Shared.Utilities;
using Models.PMF;
using Models.Soils;
using Models.Core;
using System;
using Models.Soils.Nutrients;

namespace Models
{
    [Serializable]
    public class Script : Model
    {
        [Link] private Clock clock;
        [Link] private Fertiliser fertiliser;
        [Link] private ISummary summary;
        [Link] private Soil soil;
        private Nutrient nutrient;
        private SoilNitrogen soilN;
        [Link]
        private IPhysical soilPhysical;


        [Separator("Fertiliser will be applied on the date(s) below")]
        [Description("Apply fertiliser on the same day(s) each year? If no, then must include the year of appliaction below")]
        public bool EachYear { get; set; }

        [Description("Dates for one or more fertiliser applications (dd-mmm or dd-mmm-yyyy) as a list with a comma between dates")]
        public string[] Dates { get; set; }

        [Separator("Test for the mineral N in the soil and don't apply the fertiliser if greater than X kgN/ha is stored in the soil above a depth of Y mm")]
        [Description("Use a critical soil mineral N to prevent application above a threshold?")]
        public bool UseCritNThreshold { get; set; }

        [Description("Don't add fertiliser if N in the soil to the depth below exceeds (kg/ha)")]
        public double CritNThreshold { get; set; }

        [Description("Depth to which the amount of N in the soil should be calculated (mm)")]
        public double CritNDepth { get; set; }

        [Separator("Fertiliser application details")]
        [Description("Depth at which to apply the fertiliser (mm)")]
        public double Depth { get; set; }

        [Description("Amount of fertiliser to apply (kg N /ha) per application")]
        public double Amount { get; set; }

        [Description("Fertiliser type - select from the list")]
        public Fertiliser.Types FertiliserType { get; set; }


        [EventSubscribe("StartOfSimulation")]
        private void FindSoilNOrNutrient(object sender, EventArgs e)
        {
            nutrient = this.FindInScope<Nutrient>() as Nutrient;
            soilN = this.FindInScope<SoilNitrogen>() as SoilNitrogen;

            if (nutrient == null && soilN == null)
                throw new Exception(string.Format("Error in script {0}: Unable to find nutrient or soilN.", Name));
        }

        [EventSubscribe("DoManagement")]
        private void OnDoManagement(object sender, EventArgs e)
        {
            if (OnApplicationDate())
            {
                if (NContentBelowThreshold())
                    fertiliser.Apply(Amount, FertiliserType, Depth);
                else
                    summary.WriteMessage(this, "Skipping fertiliser application due to soil mineral N content being above critical threshold.", MessageType.Diagnostic);
            }
        }

        /// <summary>Checks if today's date is one of the specified fertiliser application dates.</summary>
        private bool OnApplicationDate()
        {
            if (EachYear)
                return Dates.Any(d => DateUtilities.DatesEqual(d, clock.Today));
            
            DateTime[] dates = Dates.Select(d => DateTime.ParseExact(d, "d-MMM-yyyy", null)).ToArray();
            return dates.Any(d => SameDate(d, clock.Today));
        }

        /// <summary>Checks if N content in soil is below critical threshold.</summary>
        private bool NContentBelowThreshold()
        {
            if (!UseCritNThreshold)
                return true;
            
            double[] weights = GetLayerWeights();
            double cumSoilN = 0;

            for (int i = 0; i < soilPhysical.Thickness.Length; i++)
            {
                if (nutrient != null)
                    cumSoilN += weights[i] * nutrient.MineralN[i];
                else if (soilN != null)
                    cumSoilN += weights[i] * soilN.mineral_n[i];
            }

            return cumSoilN <= CritNThreshold;
        }

        private double[] GetLayerWeights()
        {
            double[] weights = new double[soilPhysical.Thickness.Length];
            double cumDepth = 0;

            for (int i = 0; i < soilPhysical.Thickness.Length; i++)
            {
                cumDepth += soilPhysical.Thickness[i];
                if (cumDepth < CritNDepth)
                    weights[i] = 1;
                else if (cumDepth - soilPhysical.Thickness[i] <= CritNDepth)
                    weights[i] = (CritNDepth - (cumDepth - soilPhysical.Thickness[i])) / soilPhysical.Thickness[i];
                else
                    weights[i] = 0;
            }

            return weights;
        }

        private bool SameDate(DateTime d1, DateTime d2)
        {
            return d1.Year == d2.Year && d1.DayOfYear == d2.DayOfYear;
        }
    }
}
```
        Manager SowingFertiliser
          Crop = [Peanut]
          FertiliserType = NO3N
          Amount = 0
```csharp
using Models.Soils;
using System;
using System.Linq;
using Models.Core;
using Models.PMF;
namespace Models
{
    [Serializable]
    public class Script : Model
    {
        [Link] Clock Clock;
        [Link] Fertiliser Fertiliser;
        
        [Description("Crop to be fertilised")]
        public IPlant Crop { get; set; }

        [Description("Type of fertiliser to apply? ")] 
        public Fertiliser.Types FertiliserType { get; set; }
    
        [Description("Amount of fertiliser to be applied (kg/ha)")]
        public double Amount { get; set; }
        
        [EventSubscribe("Sowing")]
        private void OnSowing(object sender, EventArgs e)
        {
            Model crop = sender as Model;
            if (Crop != null && crop.Name.ToLower() == (Crop as IModel).Name.ToLower())
                Fertiliser.Apply(Amount: Amount, Type: FertiliserType);
        }
    }
}
```
        Manager SowingRule
          Crop = [Peanut]
          SowDate = 15-Nov
          CultivarName = Redvale
          SowingDepth = 50
          RowSpacing = 900
          Population = 15
```csharp
using APSIM.Shared.Utilities;
using Models.Utilities;
using Models.Soils;
using Models.PMF;
using Models.Core;
using System;
using System.Linq;

namespace Models
{
    [Serializable]
    public class Script : Model
    {
        [Link] Clock Clock;
        [Link] Fertiliser Fertiliser;
        [Link] Summary Summary;
        [Link] Soil Soil;
        
        [Description("Crop")]
        public IPlant Crop { get; set; }

        [Description("Sowing date (d-mmm)")]
        public string SowDate { get; set; }

        [Display(Type = DisplayType.CultivarName)]
        [Description("Cultivar to be sown")]
        public string CultivarName { get; set; }

        [Description("Sowing depth (mm)")]
        public double SowingDepth { get; set; }

        [Description("Row spacing (mm)")]
        public double RowSpacing { get; set; }

        [Description("Plant population (/m2)")]
        public double Population { get; set; }

        [EventSubscribe("DoManagement")]
        private void OnDoManagement(object sender, EventArgs e)
        {
            if (DateUtilities.WithinDates(SowDate, Clock.Today, SowDate))
            {
                Crop.Sow(population: Population, cultivar: CultivarName, depth: SowingDepth, rowSpacing: RowSpacing);    
            }
        }
    }
}
```
        Manager Harvest
```csharp
using Models.Soils.Nutrients;
using System;
using System.Linq;
using Models.Core;
using Models.PMF;
using Models.Soils;
using Models.Soils.Nutrients;
using Models.Utilities;
using APSIM.Shared.Utilities;

namespace Models
{
    [Serializable]
    public class Script : Model
    {
        [Link] Plant Peanut;

        [EventSubscribe("DoManagement")]
        private void OnDoManagement(object sender, EventArgs e)
        {
            if (Peanut.IsReadyForHarvesting)
            {
               Peanut.Harvest();
               Peanut.EndCrop();    
            }
        
        }
        
    }
}
```
        Soil SoilType =  clay loam: SoilType=SoilType =  clay loam; ApsoilNumber=0; Latitude=19; Longitude=105
          DataSource=Original source is www.isric.org. See: https://www.isric.org/explore/soilgrids/faq-soilgrids  2023-05-13 21:04:36.289611
          Comments=resolution = 250m - taxonomic classification name = clay loam - drainage class = NA - elevation = NA - slope = NA - geomdesc = NA
          Physical
            Thickness  ParticleSizeClay  ParticleSizeSand  ParticleSizeSilt  BD    AirDry  LL15   DUL    SAT    KS
            50         32.5              37.1              30.4              1.26  0.098   0.196  0.322  0.422  258.602
            100        32.3              36.7              31                1.31  0.194   0.194  0.322  0.422  261.571
            150        34.2              35.7              30.1              1.39  0.205   0.205  0.333  0.427  216.109
            300        36.3              34.9              28.8              1.41  0.217   0.217  0.345  0.433  175.535
            400        39.8              33.2              27                1.44  0.238   0.238  0.366  0.444  123.982
            1000       38                33.4              28.6              1.44  0.227   0.227  0.356  0.439  148.375
            SoilCrop MaizeSoil: LL=[0.196, 0.194, 0.205, 0.217, 0.238, 0.227]; KL=[0.06, 0.049, 0.04, 0.033, 0.027, 0.022]; XF=[1, 1, 1, 1, 1, 1]
            SoilCrop SugarcaneSoil: LL=[0.196, 0.194, 0.205, 0.217, 0.238, 0.227]; KL=[0.06, 0.049, 0.04, 0.033, 0.027, 0.022]; XF=[1, 1, 1, 1, 1, 1]
            SoilCrop PeanutSoil: LL=[0.196, 0.194, 0.205, 0.217, 0.238, 0.227]; KL=[0.06, 0.049, 0.04, 0.033, 0.027, 0.022]; XF=[1, 1, 1, 1, 1, 1]
          WaterBalance SoilWater: SummerDate=1-Nov; SummerU=6; SummerCona=3.5; WinterDate=1-Apr; WinterU=4; WinterCona=2.5; DiffusConst=40; DiffusSlope=16; Salb=0.13; CN2Bare=73; CNRed=20; CNCov=0.8; PSIDul=-100; Thickness=[50, 100, 150, 300, 400, 1000]; SWCON=[0.4, 0.4, 0.4, 0.4, 0.4, 0.4]
          Organic: FOMCNRatio=40; CarbonUnits=Total
            Thickness  Carbon  SoilCNRatio  FBiom  FInert  FOM
            50         2.11    12           0.04   0.8     150
            100        1.56    12           0.033  0.808   122.81
            150        1.09    12           0.027  0.816   100.548
            300        0.91    12           0.022  0.824   82.322
            400        0.55    12           0.018  0.833   67.399
            1000       0.46    12           0.015  0.841   55.182
          Chemical: Thickness=[50, 100, 150, 300, 400, 1000]; PH=[6, 6, 6.1, 6.2, 6.2, 6.3]; PHUnits=Water
            PH source: Unknown source or quality of data
          Water: Thickness=[50, 100, 150, 300, 400, 1000]; InitialValues=[0.322, 0.322, 0.333, 0.345, 0.366, 0.356]; RelativeTo=LL15; FilledFromTop=true
          Nutrient
          CERESSoilTemperature Temperature
          Solute NO3: Thickness=[50, 100, 150, 300, 400, 1000]; InitialValues=[0.5, 0.495, 0.49, 0.485, 0.48, 0.476]; InitialValuesUnits=ppm; WaterTableConcentration=0; D0=0; DepthConstant=0; MaxDepthSoluteAccessible=0; RunoffEffectivenessAtMovingSolute=0; MaxEffectiveRunoff=0
          Solute NH4: Thickness=[50, 100, 150, 300, 400, 1000]; InitialValues=[0.05, 0.05, 0.049, 0.049, 0.048, 0.048]; InitialValuesUnits=ppm; WaterTableConcentration=0; D0=0; DepthConstant=0; MaxDepthSoluteAccessible=0; RunoffEffectivenessAtMovingSolute=0; MaxEffectiveRunoff=0
          Solute Urea: Thickness=[50, 100, 150, 300, 400, 1000]; InitialValues=[0, 0, 0, 0, 0, 0]; InitialValuesUnits=kg/ha; WaterTableConcentration=0; D0=0; DepthConstant=0; MaxDepthSoluteAccessible=0; RunoffEffectivenessAtMovingSolute=0; MaxEffectiveRunoff=0
  Experiment Experiment1
    Factors
      Factor: Specification=[FertiliseOnFixedDate].Script.Amount =500 to 500 step 1
    Simulation PeanutRCP45
      Clock: Start=2011-01-01; End=2100-12-31
      Summary summaryfile
      Weather
        FileName=/Users/fuhsinliao/Downloads/Climate_Rcp45_lat19_lon105 (1).met
      SoilArbitrator Soil Arbitrator
      MicroClimate: a_interception=0; b_interception=1; c_interception=0; d_interception=0; SoilHeatFluxFraction=0.4; MinimumHeightDiffForNewLayer=0; NightInterceptionFraction=0.5; ReferenceHeight=2
      Zone paddock: Area=1; Slope=0; AspectAngle=0; Altitude=50
        Irrigation
        Manager Automatic irrigation based on water deficit: same as Experiment.PeanutRCP85.paddock.Automatic irrigation based on water deficit
        Fertiliser
        SurfaceOrganicMatter: InitialResidueName=maize; InitialResidueType=maize; InitialResidueMass=4500; InitialStandingFraction=0; InitialCPR=0; InitialCNR=55
        Report PeanutReport45: EventNames=[Peanut].Harvesting
          VariableNames:
            [Clock].Today
            [Peanut].Grain.Total.Wt*10 as Yield
            sum([Peanut].Total.Wt) as TotalYield2
            [Weather].Rain
            sum([Soil].NO3.kgha)
            [Peanut].TotalLive.Wt
        Plant Peanut
        Manager FertiliseOnFixedDate: same as Experiment.PeanutRCP85.paddock.FertiliseOnFixedDate
        Manager SowingFertiliser: same as Experiment.PeanutRCP85.paddock.SowingFertiliser
        Manager SowingRule: same as Experiment.PeanutRCP85.paddock.SowingRule
        Manager Harvest: same as Experiment.PeanutRCP85.paddock.Harvest
        Soil SoilType =  clay loam: same as Experiment.PeanutRCP85.paddock.SoilType =  clay loam
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