Simulations: Version=160
  DataStore
  Simulation Sugarcane
    Weather: FileName=Climate_Rcp45_lat19_lon105_v2.met
    Clock: Start=2011-01-01; End=2100-12-31
    Summary summaryfile
    MicroClimate: a_interception=0; b_interception=1; c_interception=0; d_interception=0; SoilHeatFluxFraction=0.4; MinimumHeightDiffForNewLayer=0; NightInterceptionFraction=0.5; ReferenceHeight=2
    Zone Field: Area=1; Slope=0; AspectAngle=0; Altitude=50
      Fertiliser
      Sugarcane: maxt_lb=0
      Folder Manager folder
        Manager SUGAR management
          planting_day = 1-july
          plantlen = 720
          plant_stalks = 10
          variety = q117
          sowing_depth = 70
          NoRatoons = 4
          ratoonlen = 360
          ratoon_stalks = 10
```csharp
using Models.Soils;
using System.Linq;
using System;
using Models.Core;
using Models.PMF;
using APSIM.Shared.Utilities;

namespace Models
{
    [Serializable]
    [System.Xml.Serialization.XmlInclude(typeof(Model))]
    public class Script : Model
    {
        [Link] Clock Clock;
        [Link] Sugarcane Sugarcane;
        
        [Description("Enter planting date (dd-mmm)")]
        public string planting_day { get; set; }
        [Description("Duration of a plant crop (days) (30days/mth x 15mths)")]
        public int    plantlen { get; set; }
        [Description("Stalk density of plant crop (/m2)")]
        public double plant_stalks { get; set; }
        [Description("Planting variety")]
        [Display(Type=DisplayType.CultivarName, PlantName = "Sugarcane")]
        public string variety { get; set; }
        [Description("Planting depth (mm)")]
        public double sowing_depth { get; set; }
        [Description("Number of ratoons before EndCrop")]  
        public int    NoRatoons { get; set; }
        [Description("Duration of a ratoon crop (days) (30days/mth x 13mths)")]
        public int    ratoonlen { get; set; }
        [Description("Stalk density of ratoon crop (/m2)")]
        public double ratoon_stalks { get; set; }
        

        private int dah;
        //Remove this later, I don't think they use it. Days After Harvest.
        
        //two below are used for rotations. Remove this. I don't think ApsimX does rotations like this.
        private int nextcrop;
        private int fallowin;

        
        [EventSubscribe("StartOfSimulation")]
        private void OnStartOfSimulation(object sender, EventArgs e)
        {
            //Rotation variables. Not sure if these are still needed in ApsimX rotations
            nextcrop = 0;
            fallowin = 0;
        }


        [EventSubscribe("StartOfDay")]
        private void OnStartOfDay(object sender, EventArgs e)
        {

            //! Initialise and set a time counter for entire run
            dah = 0;


            if (Sugarcane.crop_status == "alive")
            {
                dah = 0;

                //! Set harvest dates for each crop phase
                if (((Sugarcane.DaysAfterSowing == plantlen) && (Sugarcane.ratoon_no == 0))
                    || ((Sugarcane.DaysAfterSowing == ratoonlen) && (Sugarcane.ratoon_no > 0)))
                {
                    
                    Sugarcane.HarvestCrop();
                    if (Sugarcane.ratoon_no == NoRatoons + 1)
                    {
                        //! plough the crop out
                        Sugarcane.KillCrop();
                        Sugarcane.EndCrop();
                    }
                    else
                    {
                        //! Set stalk density
                        Sugarcane.plants = ratoon_stalks;
                    }
                }
                else
                {
                    //! We have not reached the harvest date for this ratoon.
                }
            }
            else if (Sugarcane.crop_status == "dead")
            {
                Sugarcane.HarvestCrop();
                Sugarcane.EndCrop();
            }
            else if ((Sugarcane.crop_status == "out") && (DateUtilities.DatesEqual(planting_day, Clock.Today)))
            {
                Sugarcane.SowNewPlant(PlantingDensity: 10, Depth: sowing_depth, CultivarName: variety);
                Sugarcane.plants = plant_stalks;
                dah = 0;
            }
            else
            {
                dah = dah + 1;
            }
     
        }
    }
}
```
        Manager Fertilise on fixed date
          fert_date = 1-Dec, 1-Feb, 1-March, 1-Apr, 1-Jul
          fert_criteria = 1000
          fert_amount = 100
          fert_type = NPK
```csharp
using Models.Soils.Nutrients;
using Models.Interfaces;
using APSIM.Shared.Utilities;
using Models.Soils;
using Models.Soils.Nutrients;
using Models.PMF;
using Models.Core;
using System;
using System.Linq;

namespace Models
{
    [Serializable]
    [System.Xml.Serialization.XmlInclude(typeof(Model))]
    public class Script : Model
    {
        [Link] private Clock Clock;
        [Link] private Soil Soil;
        [Link] private Fertiliser Fertiliser;
        [Link] private Summary Summary;
        private double N_topsoil;
        [Link(ByName = true)]
        private ISolute NO3;
        [Link(ByName = true)]
        private ISolute NH4;

        
        [Description("Fertilise on this date (dd-mmm)")]
        public string fert_date { get; set; }
        
        [Description("Don't add fertiliser if N in top 2 layers exceeds (kg/ha)")]
        public double fert_criteria { get; set; }
        
        [Description("Amount to apply (kg/ha)")]
        public double fert_amount { get; set; }
        
        [Description("Type of fertilser to apply")]
        public string fert_type { get; set; }
    


        /*
         if (today = date('[fert_date]') then
            N_topsoil = no3(1) + nh4(1) + no3(2) + nh4(2)
            if (N_topsoil < [fert_criteria]) then
               [fertmodule] apply amount = [fert_amount] (kg/ha), depth = 50 (mm), type = [fert_type] ()
            endif
         endif 
        */
        
        
        [EventSubscribe("StartOfDay")]
        private void OnStartOfDay(object sender, EventArgs e)
        {

            if (DateUtilities.DatesEqual(fert_date, Clock.Today))
            {
                N_topsoil = NO3.kgha[1] + NH4.kgha[1] + NO3.kgha[2] + NH4.kgha[2];                    
                if (N_topsoil < fert_criteria)
                {
                    Fertiliser.Apply(Amount: fert_amount, Depth: 50, Type: Fertiliser.Types.UreaN);
                }
            }

        }
      
    }
}
```
      Report SugarcaneReport: EventNames=[Sugarcane].Harvesting
        VariableNames:
          [Clock].Today
          [Sugarcane].cane_wt as SugarcaneYield
          [Sugarcane].sucrose_wt
          [Sugarcane].height
          [Sugarcane].WaterDemand
      SurfaceOrganicMatter Surface Organic Matter: InitialResidueName=sugar_trash; InitialResidueType=Sugarcane; InitialResidueMass=1000; InitialStandingFraction=1; InitialCPR=0; InitialCNR=80
      Manager Fertilise at sowing
        Crop = [Sugarcane]
        FertiliserType = DAP
        Amount = 50
```csharp
using Models.Soils;
using System;
using System.Linq;
using Models.Core;
using Models.PMF;
namespace Models
{
    [Serializable]
    public class Script : Model
    {
        [Link] Clock Clock;
        [Link] Fertiliser Fertiliser;
        
        [Description("Crop to be fertilised")]
        public IPlant Crop { get; set; }

        [Description("Type of fertiliser to apply? ")] 
        public Fertiliser.Types FertiliserType { get; set; }
    
        [Description("Amount of fertiliser to be applied (kg/ha)")]
        public double Amount { get; set; }
        
        [EventSubscribe("Sowing")]
        private void OnSowing(object sender, EventArgs e)
        {
            Model crop = sender as Model;
            if (Crop != null && crop.Name.ToLower() == (Crop as IModel).Name.ToLower())
                Fertiliser.Apply(Amount: Amount, Type: FertiliserType);
        }
    }
}
```
      Soil SoilType =  clay loam: SoilType=SoilType =  clay loam; ApsoilNumber=0; Latitude=19; Longitude=105
        DataSource=Original source is www.isric.org. See: https://www.isric.org/explore/soilgrids/faq-soilgrids  2023-05-17 18:47:57.621079
        Comments=resolution = 250m - taxonomic classification name = clay loam - drainage class = NA - elevation = NA - slope = NA - geomdesc = NA
        Water: Thickness=[50, 100, 150, 300, 400, 1000]; InitialValues=[0.322, 0.322, 0.333, 0.345, 0.366, 0.356]; InitialPAWmm=256.9; RelativeTo=LL15; FilledFromTop=true
        Physical
          Thickness  ParticleSizeClay  ParticleSizeSand  ParticleSizeSilt  BD    AirDry  LL15   DUL    SAT    KS
          50         32.5              37.1              30.4              1.26  0.098   0.196  0.322  0.422  258.602
          100        32.3              36.7              31                1.31  0.194   0.194  0.322  0.422  261.571
          150        34.2              35.7              30.1              1.39  0.205   0.205  0.333  0.427  216.109
          300        36.3              34.9              28.8              1.41  0.217   0.217  0.345  0.433  175.535
          400        39.8              33.2              27                1.44  0.238   0.238  0.366  0.444  123.982
          1000       38                33.4              28.6              1.44  0.227   0.227  0.356  0.439  148.375
          SoilCrop SugarcaneSoil: LL=[0.196, 0.194, 0.205, 0.217, 0.238, 0.227]; KL=[0.06, 0.049, 0.04, 0.033, 0.027, 0.022]; XF=[1, 1, 1, 1, 1, 1]
        WaterBalance SoilWater: SummerDate=1-Nov; SummerU=4; SummerCona=3; WinterDate=1-Apr; WinterU=4; WinterCona=3; DiffusConst=40; DiffusSlope=16; Salb=0.13; CN2Bare=73; CNRed=20; CNCov=0.8; PSIDul=-100; Thickness=[50, 100, 150, 300, 400, 1000]; SWCON=[0.4, 0.4, 0.4, 0.4, 0.4, 0.4]
        Organic: FOMCNRatio=70; CarbonUnits=Total
          Thickness  Carbon  SoilCNRatio  FBiom  FInert  FOM
          50         2.11    12           0.04   0.8     150
          100        1.56    12           0.033  0.808   122.81
          150        1.09    12           0.027  0.816   100.548
          300        0.91    12           0.022  0.824   82.322
          400        0.55    12           0.018  0.833   67.399
          1000       0.46    12           0.015  0.841   55.182
        Chemical: Thickness=[50, 100, 150, 300, 400, 1000]; PH=[6, 6, 6.1, 6.2, 6.2, 6.3]; PHUnits=Water
        CERESSoilTemperature Temperature
        Nutrient
        Solute NO3: Thickness=[50, 100, 150, 300, 400, 1000]; InitialValues=[0.5, 0.495, 0.49, 0.485, 0.48, 0.476]; InitialValuesUnits=ppm; WaterTableConcentration=0; D0=0; DepthConstant=0; MaxDepthSoluteAccessible=0; RunoffEffectivenessAtMovingSolute=0; MaxEffectiveRunoff=0
        Solute NH4: Thickness=[50, 100, 150, 300, 400, 1000]; InitialValues=[0.05, 0.05, 0.049, 0.049, 0.048, 0.048]; InitialValuesUnits=ppm; WaterTableConcentration=0; D0=0; DepthConstant=0; MaxDepthSoluteAccessible=0; RunoffEffectivenessAtMovingSolute=0; MaxEffectiveRunoff=0
        Solute Urea: Thickness=[50, 100, 150, 300, 400, 1000]; InitialValues=[0, 0, 0, 0, 0, 0]; InitialValuesUnits=kg/ha; WaterTableConcentration=0; D0=0; DepthConstant=0; MaxDepthSoluteAccessible=0; RunoffEffectivenessAtMovingSolute=0; MaxEffectiveRunoff=0
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